# OpenSim document version 40000
AnalyzeTool TRIAL_NAME:
  model_file: MODEL_FILE
  replace_force_set: false
  results_directory: RESULTS_DIRECTORY
  output_precision: 8
  initial_time: INITIAL_TIME
  final_time: FINAL_TIME
  solve_for_equilibrium_for_auxiliary_states: false
  maximum_number_of_integrator_steps: 20000
  maximum_integrator_step_size: 1
  minimum_integrator_step_size: 1e-8
  integrator_error_tolerance: 1e-5
  states_file: COMBINED_STATES_FILE
  lowpass_cutoff_frequency_for_coordinates: -1
  AnalysisSet Analyses:
    JointReaction: start_time=INITIAL_TIME end_time=FINAL_TIME step_interval=1 in_degrees=true joint_names=GlenoHumeral
        apply_on_bodies=parent express_in_frame=parent
  ControllerSet Controllers:
    ControlSetController: controls_file=COMBINED_ACTIVATION_FILE
